// SBML level 2 version 1

// Defines light value depending on time of day
// LD is a function of time of the day, LD=1 at time t=0 (dawn) and changes to LD=1 at time t=12(dusk) and remains at that value until dawn when it resumes it cycle. The original publication made use of a combination of Function definition, rate rules and events to accomplish this while the the model here does the same thing without the use of Events. This makes it portable across simulators without compromising the published model in any way.
function LD(tod, length)
  ceil(sin(pi*tod/length + 0.001)/2);
end

model Locke2005_CircadianClock()
  // Locke2005_CircClock
  // SBML model of the interlocked feedback loop network
  // The model describes the circuit depicted in Fig. 4 and reproduces the simulations in Figure 5A and 5B. It provides initial conditions, parameter values and rules for the production rates of the following species: LHY mRNA (cLm), cytoplasmic LHY (cLc), nuclear LHY (cLn), TOC1 mRNA (cTm), cytoplasmic TOC1 (cTc), nuclear TOC1 (cTn),X mRNA (cXm), cytoplasmic X (cXc), nuclear X (cXn), Y mRNA (cYm), cytoplasmic Y (cYc), nuclear Y (cYn), nuclear P (cPn). This model was successfully tested on MathSBML and SBML ODE Solver.
  // Fig 5B is not in the right phase. However, the data is correct relative to the light/dark bars at the top of the figure.
  // This model originates from BioModels Database: A Database of Annotated Published Models. It is copyright (c) 2005-2008 The BioModels Team.
  // For more information see the terms of use.

  // Compartments:
  compartment compartment = 1;

  // Species:
  species cLm in compartment = 0.539;
  species cLc in compartment = 0.015;
  species cLn in compartment = 0.0855;
  species cTm in compartment = 0.456;
  species cTc in compartment = 8.7;
  species cTn in compartment = 0.4;
  species cXm in compartment = 0.08;
  species cXc in compartment = 1.34;
  species cXn in compartment = 0.4;
  species cYm in compartment = 0.037;
  species cYc in compartment = 0.004;
  species cYn in compartment = 0.013;
  species cPn in compartment = 0.835;

  // Parameters:
  q1 = 2.4514;
  n1 = 5.1694;
  a = 3.3064;
  g1 = 0.876738488;
  m1 = 1.5283;
  k1 = 1.817;
  p1 = 0.8295;
  r1 = 16.8363;
  r2 = 0.1687;
  m2 = 20.44;
  k2 = 1.5644;
  m3 = 3.6888;
  k3 = 1.2765;
  n2 = 3.0087;
  b = 1.0258;
  g2 = 0.036805783;
  g3 = 0.26593318;
  c = 1.0258;
  m4 = 3.8231;
  k4 = 2.5734;
  p2 = 4.324;
  r3 = 0.3166;
  r4 = 2.1509;
  m5 = 0.0013;
  m6 = 3.1741;
  k5 = 2.7454;
  m7 = 0.0492;
  m8 = 4.0424;
  k6 = 0.4033;
  n3 = 0.2431;
  d = 1.4422;
  g4 = 0.538811228;
  m9 = 10.1132;
  k7 = 6.5585;
  p3 = 2.147;
  r5 = 1.0352;
  r6 = 3.3017;
  m10 = 0.2179;
  k8 = 0.6632;
  m11 = 3.3442;
  k9 = 17.1111;
  q2 = 2.40178;
  n4 = 0.0857;
  n5 = 0.1649;
  g5 = 1.17803247;
  g6 = 0.064455137;
  f = 1.0237;
  e = 3.6064;
  m12 = 4.297;
  k10 = 1.7303;
  p4 = 0.2485;
  r7 = 2.2123;
  r8 = 0.2002;
  m13 = 0.1347;
  k11 = 1.8258;
  m14 = 0.6114;
  k12 = 1.8066;
  p5 = 0.5;
  k13 = 1.2;
  q3 = 1;
  m15 = 1.2;
  Lmax = 1;
  Lmin = 0;
  CP = 24;
  dayLength = 12;

  // Reactions:
  one11: => cLm; compartment*PÎ(time, dayLength)*q1*cPn; one11 is "LHY transcription by light activation";  // modifiers: cPn
  two11: => cLm; compartment*(n1*cXn^a/(g1^a + cXn^a)); two11 is "Light independent LHY transcription";  // modifiers: cXn
    two11_Fch_0 = 8;
  three11: cLm => ; compartment*(m1*cLm/(k1 + cLm)); three11 is "LHY mRNA degradation";
  one12: => cLc; compartment*p1*cLm; one12 is "LHY translation";  // modifiers: cLm
  three12: cLn => cLc; compartment*r2*cLn; three12 is "LHY transport out of nucleus";
  four12: cLc => ; compartment*(m2*cLc/(k2 + cLc)); four12 is "Cytoplasmic LHY degradation";
    four12_Fch_0 = 8;
  one13: cLc => cLn; compartment*r1*cLc; one13 is "LHY transport into nucleus";
  three13: cLn => ; compartment*(m3*cLn/(k3 + cLn)); three13 is "Nuclear LHY degradation";
  one14: => cTm; compartment*(n2*cYn^b/(g2^b + cYn^b))*(g3^c/(g3^c + cLn^c)); one14 is "TOC1 transcription";  // modifiers: cYn, cLn
  two14: cTm => ; compartment*(m4*cTm/(k4 + cTm)); two14 is "TOC mRNA degradation";
  one15: => cTc; compartment*p2*cTm; one15 is "TOC1 translation";  // modifiers: cTm
  three15: cTn => cTc; compartment*r4*cTn; three15 is "TOC1 transport out of nucleus";
  four15: cTc => ; compartment*((1 - (`ÐXŸÑ6šdC(time, dayLength))*m5 + m6)*(cTc/(k5 + cTc)); four15 is "Cytoplasmic TOC1 degradation";
  one16: cTc => cTn; compartment*r3*cTc; one16 is "TOC1 movement into nucleus";
  three16: cTn => ; compartment*((1 - ÷‰dC(time, dayLength))*m7 + m8)*(cTn/(k6 + cTn)); three16 is "Nuclear TOC1 degradation";
  one17: => cXm; compartment*(n3*cTn^d/(g4^d + cTn^d)); one17 is "Protein X transcription";  // modifiers: cTn
  two17: cXm => ; compartment*(m9*cXm/(k7 + cXm)); two17 is "Protein X degradation";
  one18: => cXc; compartment*p3*cXm; one18 is "Protein X translation";  // modifiers: cXm
  three18: cXn => cXc; compartment*r6*cXn; three18 is "ProteinX movement out of nucleus";
  four18: cXc => ; compartment*(m10*cXc/(k8 + cXc)); four18 is "Cytoplasmic Protein X degradation";
  one19: cXc => cXn; compartment*r5*cXc; one19 is "Protein X movement into nucleus";
  three19: cXn => ; compartment*(m11*cXn/(k9 + cXn)); three19 is "Nuclear Protein X degradation";
  one20: => cYm; compartment*(çâfC(time, dayLength)*q2*cPn + (âfC(time, dayLength)*n4 + n5)*g5^e/(g5^e + cTn^e))*(g6^f/(g6^f + cLn^f)); one20 is "Protein Y transcription";  // modifiers: cPn, cTn, cLn
  two20: cYm => ; compartment*(m12*cYm/(k10 + cYm)); two20 is "Protein Y mRNA degradation";
  one21: => cYc; compartment*p4*cYm; one21 is "Protein Y translation";  // modifiers: cYm
  three21: cYn => cYc; compartment*r8*cYn; three21 is "Protein Y out of nucleus";
  four21: cYc => ; compartment*(m13*cYc/(k11 + cYc)); four21 is "Cytoplasmic Protein Y degradation";
  one22: cYc => cYn; compartment*r7*cYc; one22 is "Protein Y into nucleus";
  three22: cYn => ; compartment*(m14*cYn/(k12 + cYn)); three22 is "Nuclear Protein Y degradation";
  one23: => cPn; compartment*(1 - À/Óp#ÓfÕfC(time, dayLength))*p5; one23 is "Light dependent production of Protein P";
  two23: cPn => ; compartment*(m15*cPn/(k13 + cPn)); two23 is "Protein P degradation";
  three23: cPn => ; compartment*q3*cPn(time, dayLength)*cPn; three23 is "Light activated Protein P degradation";

  // Unit definitions:
  unit substance = 1e-9 mole; substance is "nM (default)";
  unit time = 3600 second; time is "hour (default)";
end
