// SBML level 2 version 1

model Kholodenko2000_MAPK_feedback()
  // This model originates from BioModels Database: A Database of Annotated Published Models. It is copyright (c) 2005-2008 The BioModels Team.
  // For more information see the terms of use.
  // To cite BioModels Database, please use Le Novère N., Bornstein B., Broicher A., Courtot M., Donizelli M., Dharuri H., Li L., Sauro H., Schilstra M., Shapiro B., Snoep J.L., Hucka M. (2006) BioModels Database: A Free, Centralized Database of Curated, Published, Quantitative Kinetic Models of Biochemical and Cellular Systems Nucleic Acids Res., 34: D689-D691.
  // biomodels.db:BIOMD0000000010
  // isDescribedBy pubmed:10712587
  // isHomologTo reactome:REACT_634
  // isVersionOf GO:0000165
  // taxonomy:8355

  // Compartments:
  compartment uVol = 1;

  // Species:
  species MKKK in uVol = 90; MKKK is "MAPKKK";  // isVersionOf uniprot:P09560
  species MKKK_P in uVol = 10; MKKK_P is "MAPKKK-P";  // isVersionOf uniprot:P09560
  species MKK in uVol = 280; MKK is "MAPKK";  // isVersionOf uniprot:Q05116
  species MKK_P in uVol = 10; MKK_P is "MAPKK-P";  // isVersionOf uniprot:Q05116
  species MKK_PP in uVol = 10; MKK_PP is "MAPKK-PP";  // isVersionOf uniprot:Q05116
  species MAPK in uVol = 280;  // isVersionOf uniprot:P26696
  species MAPK_P in uVol = 10; MAPK_P is "MAPK-P";  // isVersionOf uniprot:P26696
  species MAPK_PP in uVol = 10; MAPK_PP is "MAPK-PP";  // isVersionOf uniprot:P26696

  // Reactions:
  J0: MKKK => MKKK_P; uVol*V1*MKKK/((1 + (MAPK_PP/Ki)^n)*(K1 + MKKK)); J0 is "MAPKKK activation";  // modifiers: MAPK_PP; isHomologTo reactome:REACT_525; isVersionOf ec-code:2.7.11.1 GO:0008349 GO:0000185
    V1 = 2.5; Ki = 9; n = 1; K1 = 10;
  J1: MKKK_P => MKKK; uVol*V2*MKKK_P/(KK2 + MKKK_P); J1 is "MAPKKK inactivation";  // isVersionOf ec-code:3.1.3.16 GO:0006470 GO:0051390
    V2 = 0.25; KK2 = 8;
  J2: MKK => MKK_P; uVol*k3*MKKK_P*MKK/(KK3 + MKK); J2 is "phosphorylation of MAPKK";  // modifiers: MKKK_P; isHomologTo reactome:REACT_614; isVersionOf ec-code:2.7.11.25 GO:0006468 GO:0004709
    k3 = 0.025; KK3 = 15;
  J3: MKK_P => MKK_PP; uVol*k4*MKKK_P*MKK_P/(KK4 + MKK_P); J3 is "phosphorylation of MAPKK-P";  // modifiers: MKKK_P; isVersionOf ec-code:2.7.11.25 GO:0004709 GO:0006468 GO:0000186; isHomologTo reactome:REACT_614
    k4 = 0.025; KK4 = 15;
  J4: MKK_PP => MKK_P; uVol*V5*MKK_PP/(KK5 + MKK_PP); J4 is "dephosphorylation of MAPKK-PP";  // isVersionOf ec-code:3.1.3.16 GO:0051389 GO:0006470
    V5 = 0.75; KK5 = 15;
  J5: MKK_P => MKK; uVol*V6*MKK_P/(KK6 + MKK_P); J5 is "dephosphorylation of MAPKK-P";  // isVersionOf ec-code:3.1.3.16 GO:0006470
    V6 = 0.75; KK6 = 15;
  J6: MAPK => MAPK_P; uVol*k7*MKK_PP*MAPK/(KK7 + MAPK); J6 is "phosphorylation of MAPK";  // modifiers: MKK_PP; hasVersion reactome:REACT_2247 reactome:REACT_136; isVersionOf ec-code:2.7.12.2 GO:0006468 GO:0004708
    k7 = 0.025; KK7 = 15;
  J7: MAPK_P => MAPK_PP; uVol*k8*MKK_PP*MAPK_P/(KK8 + MAPK_P); J7 is "phosphorylation of MAPK-P";  // modifiers: MKK_PP; hasVersion reactome:REACT_2247 reactome:REACT_136; isVersionOf ec-code:2.7.12.2 GO:0000187 GO:0004708 GO:0006468
    k8 = 0.025; KK8 = 15;
  J8: MAPK_PP => MAPK_P; uVol*V9*MAPK_PP/(KK9 + MAPK_PP); J8 is "dephosphorylation of MAPK-PP";  // isVersionOf ec-code:3.1.3.16 GO:0006470 GO:0000188
    V9 = 0.5; KK9 = 15;
  J9: MAPK_P => MAPK; uVol*V10*MAPK_P/(KK10 + MAPK_P); J9 is "dephosphorylation of MAPK-P";  // isVersionOf ec-code:3.1.3.16 GO:0006470
    V10 = 0.5; KK10 = 15;

  // Unit definitions:
  unit substance = 1e-9 mole; substance is "nanomole";
end
